dx := 10/1023
i := 0 .. 1023
X[i] := dx*i
Y[i] := -(100 - sqrt(100^2 - X[i]^2))
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atan(0.0250156445618) = 0.0250104
N(x, y, z) := [x; y; z + 50]
α := atan(1/sqrt(3)) = 0.523599
# [component: inputs Y]
sqrt(2)*4.5/tan(2*α) + sqrt(2)*4.5*tan(α) = 7.34847
n(x, y, z) := N(x, y, z)/|N(x, y, z)|
# [component: outputs A]
sqrt(2)*4.5/sin(2*α) = 7.34847
D := [0; 0; 1]
j := 0 .. 1023
i := 0 .. 143
5*sqrt(2) = 7.07107
A = [
    0.003134, 0.003134, 0;
    0.002615, 0.002139, 0;
    0.0022, 0.0014, 0;
    0.001889, 0.000858, 0;
    0.001681, 0.000459, 0;
    0.001578, 0.000143, 0;
    0.001578, -0.000143, 0;
    0.001681, -0.000459, 0;
    0.001889, -0.000858, 0;
    0.0022, -0.0014, 0
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]
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X =  # no stored result
Y =  # no stored result
A[:, 0][i]^2 + A[:, 1][i]^2 + A[:, 2][i]^2 = [
    1.96439e-5; 1.14135e-5; 6.8e-6; 4.30448e-6; 3.03644e-6; 2.51053e-6; 2.51053e-6; 3.03644e-6; 4.30448e-6; 6.8e-6
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]
i := 0 .. 11
m := 0 .. 143
j := 0 .. 11
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P1[i, j] := A[:, 0][12*i + (j - 12*floor(j/12))]
P2[i, j] := A[:, 1][12*i + (j - 12*floor(j/12))]
P3[i, j] := A[:, 2][12*i + (j - 12*floor(j/12))]
T[i, j] := 12*i + (j - 12*floor(j/12))
P1[0, 1] = 0.002615
P2[0, 1] = 0.002139
d := 10/11
A = [
    0.003134, 0.003134, 0;
    0.002615, 0.002139, 0;
    0.0022, 0.0014, 0;
    0.001889, 0.000858, 0;
    0.001681, 0.000459, 0;
    0.001578, 0.000143, 0;
    0.001578, -0.000143, 0;
    0.001681, -0.000459, 0;
    0.001889, -0.000858, 0;
    0.0022, -0.0014, 0
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]
R[i, j] := sqrt(P1[:, j][i]^2 + P2[:, j][i]^2)
G[m] := [A[:, 0][m]; A[:, 1][m]; A[:, 2][m]]
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R = [
    0.00443215, 0.00337839, 0.00260768, 0.00207473, 0.00174254, 0.00158447, 0.00158447, 0.00174254, 0.00207473, 0.00260768, 0.00337839, 0.00443215;
    0.00337839, 0.00242538, 0.00174307, 0.00128249, 0.00100339, 0.000872299, 0.000872299, 0.00100339, 0.00128249, 0.00174307, 0.00242538, 0.00337839;
    0.00260768, 0.00174307, 0.00113986, 0.000748402, 0.000518792, 0.000415213, 0.000415213, 0.000518792, 0.000748402, 0.00113986, 0.00174307, 0.00260768;
    0.00207473, 0.00128249, 0.000748402, 0.000415779, 0.000233238, 0.000156109, 0.000156109, 0.000233238, 0.000415779, 0.000748402, 0.00128249, 0.00207473;
    0.00174254, 0.00100339, 0.000518792, 0.000233238, 8.90955e-5, 3.7e-5, 3.7e-5, 8.90955e-5, 0.000233238, 0.000518792, 0.00100339, 0.00174254;
    0.00158447, 0.000872299, 0.000415213, 0.000156109, 3.7e-5, 2.82843e-6, 2.82843e-6, 3.7e-5, 0.000156109, 0.000415213, 0.000872299, 0.00158447;
    0.00158447, 0.000872299, 0.000415213, 0.000156109, 3.7e-5, 2.82843e-6, 2.82843e-6, 3.7e-5, 0.000156109, 0.000415213, 0.000872299, 0.00158447;
    0.00174254, 0.00100339, 0.000518792, 0.000233238, 8.90955e-5, 3.7e-5, 3.7e-5, 8.90955e-5, 0.000233238, 0.000518792, 0.00100339, 0.00174254;
    0.00207473, 0.00128249, 0.000748402, 0.000415779, 0.000233238, 0.000156109, 0.000156109, 0.000233238, 0.000415779, 0.000748402, 0.00128249, 0.00207473;
    0.00260768, 0.00174307, 0.00113986, 0.000748402, 0.000518792, 0.000415213, 0.000415213, 0.000518792, 0.000748402, 0.00113986, 0.00174307, 0.00260768;
    0.00337839, 0.00242538, 0.00174307, 0.00128249, 0.00100339, 0.000872299, 0.000872299, 0.00100339, 0.00128249, 0.00174307, 0.00242538, 0.00337839;
    0.00443215, 0.00337839, 0.00260768, 0.00207473, 0.00174254, 0.00158447, 0.00158447, 0.00174254, 0.00207473, 0.00260768, 0.00337839, 0.00443215
]
